solve block
    # guess values
    a := 0
    b := 0
    g := 0
    j := 0
    p1 := 0.3
    c := 0
    f := 0
    k := 0
    p2 := 0.4
    d := 0
    h := 0
    l := 0
    e := 0
    i := 0
    m := 0
    # constraints
    a == 0
    b == 0
    c == p1*d + p1*(1 - p2)*g + (1 - p2)*e
    d == p1*c + p1*(1 - p2)*f
    e == (1 - p1)*c + (1 - p1)*(1 - p2)*f
    g == (1 - p2)*p1*i + p1*p2*f
    h == p2*(1 - p1)*f + (1 - p1)*(1 - p2)*i
    i == (1 - p1)*p2*g + (p1*p2 + (1 - p1)*(1 - p2) + p2*(1 - p1))*m + (1 - p2)*k + p2*h + (p1*p2 + (1 - p1)*(1 - p2))*j
    j == p1*p2*i + (1 - p2)*p1*l
    k == ((1 - p1)*(1 - p2) + p2*(1 - p1))*l + p2*(1 - p1)*i
    l == p2*(1 - p1)*j + p2*k + (p1*p2 + (1 - p1)*(1 - p2) + p2*(1 - p1))*m
    m == p1*p2*l
    a + b + c + d + e + f + g + h + i + j + k + l + m == 1
    # solver
    [a; b; c; d; e; f; g; h; i; j; k; l; m] := find(a, b, c, d, e, f, g, h, i, j, k, l, m) = [0; 0; 0.160494; 0.0898269; 0.209596; 0.231547; 0.0432709; 0.100966; 0.0860291; 0.0142707; 0.0394385; 0.021929; 0.00263148]
    Lоч := m*2 + l*m + k*2 + j + i + h
    Lоч = 0.285463
    A := (1 - p2)*(m + l + k + j + i + h + g + f + e)
    A = 0.449807
    Pотк := 0.5*(1 - A/0.5)
    Pотк = 0.0501928
end solve block
