solve block
    # guess values
    a := 0
    d := 0
    μ := 0.5
    p := 0.4
    b := 0
    e := 0
    λ := 0.45
    c := 0
    f := 0
    # constraints
    (λ*p + (1 - p)*λ)*a == c*μ + b*μ
    (μ + λ*p + (1 - p)*λ)*b == μ*d + λ*p*a
    (μ + p*λ + (1 - p)*λ)*c == μ*f + μ*e + (1 - p)*λ*a
    (p*λ + μ)*e == (1 - p)*λ*b + λ*p*f + λ*p*c
    (μ + λ*p)*f == λ*(1 - p)*c
    a + b + c + d + e + f == 1
    # solver
    [a; b; c; d; e; f] := find(a, b, c, d, e, f) = [0.369004; 0.115708; 0.216396; 0.0870032; 0.125968; 0.0859218]
    Potk1 := d
    Q1 := 1 - Potk1
    Potk2 := (f + e + d) + (1 - (f + e + d))*((e + f)/(c + e + f))*(λ*p/(μ + λ*p))
    Q1 = 0.912997
    Q2 := 1 - Potk2
    Q2 = 0.60929
end solve block
